n := 0
y := 6
U1(x, y) := sum(C1(k, y)*x^k, k = n .. y) → sum(x^k*C1(k, y), k = 0 .. y)
U(x, y) := sum({
    C0(k, y)*x^k if k ≠ 0
    x^k otherwise
}, k = n .. y)
P := 1
p2 := 1
p := 0
U1(x, 1) → x*C1(1, 1) + C1(0, 1)
p1 := 0
U1(x, 0) → C1(0, 0)
integral(U(x, 1)*U(x, 2), x = p .. P)  # error: pattern match exception
a0(x) := 1
a1(x) := 1 - 2/(p2 + p1)*x → 1 - 2*x
f1(x) := x
f1(x) := x - 1.33333333333*x^2
a2(x) := 1 + a21*x + a22*x^2
f2(x) := x - 3.33333333333*x^2 + 2.5*x^3
a3(x) := 1 + a31*x + a32*x^2 + a33*x^3
integral(f1(x)*f2(x), x = 0 .. 1) = 4.06576e-18
d1(a21, a22) := integral(a2(x)*a1(x), x = p1 .. p2) → -a21/6 - a22/6
d2(a21, a22) := integral(a2(x)*a0(x), x = p1 .. p2) → a21/2 + a22/3 + 1
Given
d1(a21, a22) == 0
d2(a21, a22) == 0
a22 < 0
[a21; a22] := Find(a21, a22)
[a21; a22] → [-6; 6]
a21 := -(6*p1 + 6*p2)/(p1^2 + 4*p1*p2 + p2^2)
a22 := 6/(p1^2 + 4*p1*p2 + p2^2)
a1(x) := 1 - 2/(p2 + p1)*x
a2(x) := 1 + a21*x + a22*x^2
integral(a2(x)*a1(x), x = p1 .. p2) → 0
integral(a2(x)*a0(x), x = p1 .. p2) → 0
d1(a31, a32, a33) := integral(a3(x)*a1(x), x = p1 .. p2) → -a31/6 - a32/6 - 3*a33/20
d2(a31, a32, a33) := integral(a3(x)*a2(x), x = p1 .. p2) → a32/30 + a33/20
d3(a31, a32, a33) := integral(a3(x)*a0(x), x = p1 .. p2) → a31/2 + a32/3 + a33/4 + 1
Given
d1(a31, a32, a33) == 0
d2(a31, a32, a33) == 0
d3(a31, a32, a33) == 0
[a31; a32; a33] := Find(a31, a32, a33)
[a31; a32; a33] → [-12; 30; -20]
a31 := -(12*p1^2 + 36*p1*p2 + 12*p2^2)/(p1^3 + 9*p1^2*p2 + 9*p1*p2^2 + p2^3)
a32 := 30/(p1^2 + 8*p1*p2 + p2^2)
a33 := -20/(p1^3 + 9*p1^2*p2 + 9*p1*p2^2 + p2^3)
a1(x) := 1 - 2/(p2 + p1)*x
a2(x) → 6*x^2 - 6*x + 1
a3(x) := 1 + a31*x + a32*x^2 + a33*x^3
a3(x) → 30*x^2 - 20*x^3 - 12*x + 1
d1(a31, a32, a33) := integral(a3(x)*a1(x), x = p1 .. p2) → 0
d2(a31, a32, a33) := integral(a3(x)*a2(x), x = p1 .. p2) → 0
d3(a31, a32, a33) := integral(a3(x)*a0(x), x = p1 .. p2) → 0
