U1(x) := x
U2(x) := x^2
N = 2
f(x) := sin(x)
N1 := 8
U1(x, y) := sum(C(k, y)*x^k, k = n .. y) → sum(x^k*C(k, y), k = n .. y)  # error: Значение должно быть функцией, но имеет форму: заряд.
t := 0.05
p := 0
P := 4/4*π
v := P/2 → π/2
n := 1
s := 1
d := 0
n1 := 0
U1(x, 1) → sum(x^k*C(k, 1), k = n .. 1)
N := floor((N + d)/s) = 2
N ≡ 2
i1 := n .. N
integral(U1(x, 0)*U1(x, 1), x = p .. 1) → integral(sum(x^k*C(k, 0), k = n .. 0)*sum(x^k*C(k, 1), k = n .. 1), x = 0 .. 1)
U(x, y) := x^(s*y - d) → x^y
U(x, 2) → x^2
G :=
    for k ∈ n1 .. N1
        G[k - n1] ← d^k/dv^k(f(v))
    G  # error: Значение должно находиться между 0 и 5.
Y :=
    for i ∈ n .. N
        for j ∈ n .. N
            Y[i - n, j - n] ← integral(U(x, i)*U(x, j), x = 0 .. P)
    Y
E :=
    for i ∈ n .. N
        E[i - n] ← integral(U(x, i)*f(x), x = 0 .. P)
    E
U(x, i1) → [x; x^2]
Y → [π^3/3, π^4/4; π^4/4, π^5/5]
E → [π; π^2 - 4]
π^3/3 = 10.3354
d^k/dv^k(f(v))/k!*(x - v)^k → {
    x0 ← π/2
    d^k/dx0^k(sin(x0))
}*(x - π/2)^k/k!
Y = [10.3354, 24.3523; 24.3523, 61.2039]
E = [3.14159; 5.8696]
G =  # error: Эта переменная не определена.
transpose(E)*Y^-1 → [48/π^2 - 60*(π^2 - 4)/π^4, 80*(π^2 - 4)/π^5 - 60/π^3]
C := transpose(E)/Y = [1.24798, -0.400654]
|Y| = 39.5355
F(x) := sum(transpose(C)[k - n]*U(x, k), k = n .. N) → 1.24798153742*x + (-0.400653677113*x^2)
Z := Y*transpose(C) - E = [7.10543e-15; 1.33227e-14]
Fsin(x) := sum((-1)^k/(2*k + 1)!*x^(2*k + 1), k = 0 .. round(N1/2) - 1) → x^5/120 - x^7/5040 - x^3/6 + x
F1(x) := sum(G[k - n1]/k!*(x - v)^k, k = n1 .. N1) → (x - π/2)^4/24 - (x - π/2)^2/2 - (x - π/2)^6/720 + (x - π/2)^8/40320 + 1
F1(x) → (x - π/2)^4/24 - (x - π/2)^2/2 - (x - π/2)^6/720 + (x - π/2)^8/40320 + 1
F(x) → 1.24798153742*x + (-0.400653677113*x^2)
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r := 0, t .. π/2
ε(q) := f(q) - F(q)
f(π/2) = 1
Fsin(x) → x^5/120 - x^7/5040 - x^3/6 + x
f(r) = [
    0; 0.0499792; 0.0998334; 0.149438; 0.198669; 0.247404; 0.29552; 0.342898; 0.389418; 0.434966
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]
F(r) = [
    0; 0.0613974; 0.120792; 0.178183; 0.23357; 0.286955; 0.338336; 0.387713; 0.435088; 0.480459
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]
ε(r) = [
    0; -0.0114183; -0.0209582; -0.0287444; -0.0349008; -0.0395506; -0.0428154; -0.0448157; -0.0456697; -0.0454938
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]
ε(r)^2 = [
    0; 0.000130377; 0.000439246; 0.00082624; 0.00121807; 0.00156425; 0.00183316; 0.00200844; 0.00208572; 0.00206968
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]
r = [
    0; 0.05; 0.1; 0.15; 0.2; 0.25; 0.3; 0.35; 0.4; 0.45
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]
t = 0.05
f(x) → sin(x)
P → π
U(x, y) → x^y
ξ1 := integral((F(x) - f(x))^2, x = 0 .. P) = 0.00182528
ξ2 := integral((F1(x) - f(x))^2, x = 0 .. P) = 9.18411e-11
ε([5]) = [2.81751]
integral((Fsin(x) - f(x))^2, x = 0 .. P) = 0.000951245
2*t*round(π/(2*t))/π = 0.986761
2*t*(round(π/(2*t)) + 1)/π = 1.01859
sum(ε(p*t)^2, p = 1 .. round(π/(2*t))) = 0.0261373
h := -0, 0.01 - 0 .. 2*P
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N = 2
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k := 1 .. 8
ε(-k) = [0.807164; 3.18928; 7.20871; 12.1592; 17.2152; 22.1908; 27.7109; 34.6363]
ε(k) = [-0.00585688; 0.0159491; 0.00305849; 0.66173; 2.81751; 6.65623; 11.5531; 16.6473]
[-2.833*10^-5; 5.533*10^-4; 0.042; 28.498; 3.907*10^3; 1.988*10^5; 5.16*10^6; 8.293*10^7]
[9.112*10^-5; 7.979*10^-3; -0.245; -18.838; 1.02*10^4; 8.615*10^5; 2.78*10^7; 5.09*10^8]
[8.968*10^-6; 4.749*10^-3; 0.645; 42.179; 1.624*10^3; 3.518*10^4; 4.761*10^5; 4.501*10^6]
[3.022*10^-4; 0.04; 1.356; -91.862; -1.115*10^4; -3.754*10^5; -6.607*10^6; -7.554*10^7]
[-1.227*10^-5; 5.436*10^-3; 0.246; -66.021; -3.108*10^3; 344.546; 1.8*10^6; 4.138*10^7]
[-5.857*10^-3; 0.016; 3.058*10^-3; 0.662; 2.818; 6.656; 11.553; 16.647]
[4.953*10^-3; 3.709*10^-3; 0.019; 0.844; 3.387; 7.922; 13.908; 20.571]
[-4.761*10^-4; -5.512*10^-6; 2.747*10^-4; -0.117; -1.235; -5.761; -17.798; -42.57]
[-3.064*10^-4; -1.736*10^-4; 2.519*10^-4; -0.135; -1.366; -6.278; -19.288; -46.114]
[-6.196*10^-6; -3.058*10^-6; -6.184*10^-6; 0.01; 0.255; 2.183; 10.987; 39.782]
[-5.48*10^-6; -4.177*10^-6; -7.665*10^-6; 0.011; 0.273; 2.311; 11.555; 41.704]
[-2.15*10^-8; 1.378*10^-7; 1.243*10^-6; -5.33*10^-4; -0.031; -0.481; -3.836; -20.411]
[2.188*10^-8; 1.311*10^-6; 1.139*10^-5; -5.116*10^-4; -0.033; -0.5; -3.97; -21.064]
[2.41*10^-7; 2.74*10^-5; 7.412*10^-4; 8*10^-3; 0.054; 0.306; 1.732; 9.341]
[-5.02*10^-6; 2.666*10^-4; 2.099*10^-3; -0.071; -1.176; -9.009; -46.15; -180.211]
[-1.018*10^-5; 3.617*10^-3; 0.207; 6.077; 94.081; 893.032; 5.959*10^3; 3.066*10^4]
[-1.4*10^-5; -7.094*10^-3; -0.314; -7.422; -116.985; -1.243*10^3; -9.475*10^3; -5.557*10^4]
[3.174*10^-5; 3.732*10^-4; -0.048; -2.838; -65.046; -871.975; -8.051*10^3; -5.616*10^4]
[-3.474*10^-4; -0.067; -12.329; -354.896; -408.802; 8.968*10^4; 1.569*10^6; 1.516*10^7]
[0.807; 3.189; 7.209; 12.159; 17.215; 22.191; 27.711; 34.636]
[0.677; 2.724; 6.119; 10.068; 13.663; 16.63; 19.509; 23.077]
[-0.171; -1.571; -6.853; -20.324; -47.296; -93.324; -164.04; -265.722]
[-0.153; -1.436; -6.326; -18.812; -43.708; -85.856; -149.914; -240.89]
[0.018; 0.358; 2.805; 13.377; 46.714; 131.488; 316.145; 674.814]
[0.016; 0.336; 2.66; 12.748; 44.62; 125.673; 302.004; 643.755]
[-1.077*10^-3; -0.048; -0.664; -4.955; -25.208; -98.39; -315.982; -873.989]
[-1.008*10^-3; -0.046; -0.639; -4.788; -24.428; -95.498; -306.935; -849.146]
[2.929*10^-5; 3.636*10^-3; 0.094; 1.115; 8.309; 44.852; 191.275; 681.061]
[-4.024*10^-4; -0.026; -0.471; -4.486; -28.592; -138.271; -546.151; -1.848*10^3]
[0.017; 2.026; 66.068; 3.932*10^3; 1.48*10^5; 2.961*10^6; 3.745*10^7; 3.385*10^8]
[-2.557*10^-3; -0.246; -5.586; -58.479; -363.938; -1.503*10^3; -4.104*10^3; -5.153*10^3]
[1.28*10^-3; 0.144; 4.154; 64.003; 663.799; 5.096*10^3; 3.068*10^4; 1.514*10^5]
[4.694*10^-3; 0.385; 3.823; -64.439; -1.692*10^3; -1.846*10^4; -1.337*10^5; -7.4*10^5]
[-0.032; -3.502; 48.577; 3.712*10^3; 5.543*10^4; 3.966*10^5; 1.346*10^6; -1.988*10^6]
[-4.565*10^-5; -0.018; -5.898; -57.13; 3.666*10^3; 1.037*10^5; 1.377*10^6; 1.213*10^7]
[0.015; 1.281; 185.396; 1.795*10^4; 6.873*10^5; 1.402*10^7; 1.837*10^8; 1.734*10^9]
[-6.725*10^-4; -0.307; -39.197; -4.793*10^3; -2.382*10^5; -6.043*10^6; -9.522*10^7; -1.054*10^9]
[6.216*10^-3; 0.337; -148.125; -2.057*10^4; -9.215*10^5; -2.078*10^7; -2.888*10^8; -2.79*10^9]
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W10 := [
    π;
    π^2 - 4;
    π^3 - 6*π;
    π^4 - 12*π^2 + 48;
    120*π - 20*π^3 + π^5;
    360*π^2 - 30*π^4 + π^6 - 1440;
    840*π^3 - 5040*π - 42*π^5 + π^7;
    1680*π^4 - 20160*π^2 - 56*π^6 + π^8 + 80640;
    362880*π - 60480*π^3 + 3024*π^5 - 72*π^7 + π^9;
    1814400*π^2 - 151200*π^4 + 5040*π^6 - 90*π^8 + π^10 - 7257600
]
ξ1 - ξ2 = 0.00182528
